// Exercise 5.1

#setenv GLPATH=C:\Program Files (x86)\GridLAB-D\lib;C:\Program Files (x86)\GridLAB-D\etc;C:\Program Files (x86)\GridLAB-D\tmy;C:\Program Files (x86)\GridLAB-D\rt
#set pauseatexit=1
#set tmp=c:\temp
#setenv path=c:\mingw\bin

#define stylesheet=http://gridlab-d.svn.sourceforge.net/viewvc/gridlab-d/trunk/core/gridlabd-2_0


module generators;
module tape;
module climate;
module residential {
     implicit_enduses NONE;
};

module powerflow {
     solver_method FBS;
    // NR_iteration_limit 50;
};


clock {
	timezone "PST+8PDT";
	starttime '2011-08-22 11:00:00';
	stoptime  '2011-08-22 12:30:00';
}


schedule zippwr {
	* 0-5 *  10-3 * .29307107017222;
	* 6 *  10-3 * 0.58614214034444;
	* 7-9 *  10-3 * 0.87921321051666;
	* 10-15 *  10-3 * 0.58614214034444;
	* 16 *  10-3 * 0.87921321051666;
	* 17 *  10-3 * 1.1722842806889;
	* 18-20 *  10-3 * 1.4653553508611;
	* 21 *  10-3 * 1.1722842806889;
	* 22 *  10-3 * 0.58614214034444;
	* 23 *  10-3 * .29307107017222;
}

schedule heatspt{
	* * * * * 60;
}

schedule coolspt{
	* * * * * 75;
}

schedule lighting {
	* 17-22 * 12-2 * 0.75 // winter
	* 18-22 * 3-5,9-11 * 0.5 // spring/fall
	* 19-22 * 6-8 * 0.25 // summer
}


object climate {
     name Seattle;
     tmyfile "WA-Seattle.tmy2";
     interpolate QUADRATIC;

};
object house{
		name hvac;
		window_wall_ratio 0.07;
		cooling_COP 3.0;
		system_mode OFF;
		auxiliary_strategy DEADBAND;
		heating_system_type HEAT_PUMP;
		cooling_system_type ELECTRIC;
		air_temperature 60;
		mass_temperature 60;
		heating_setpoint heatspt*1;
		cooling_setpoint coolspt*1;
		object recorder{
			property hvac_power;
			file "test_HVAC_peak_heat.csv";
			interval 60;
			limit 86447;
		};

	};

object lights {
	name installed-power;
	installed_power 500 W;
	power_fraction 1.0;
	type CFL; // -> PF = -0.92
	power_factor -0.92;
	shape "type: analog; schedule: lighting";

}

object recorder {
	parent installed-power;
	property energy;
	file test_lights_standalone.csv;
	interval 60;
	limit 8760;
}


object solar_train{
	 parent Seattle;
	 name batt;
         Energy1 100;
         kind 1;
         speed 20;
         num_stations 6;
         passengers 50;
         weight 20000;


}

 object solar {
             name sol;
             generator_mode SUPPLY_DRIVEN;
             generator_status ONLINE;
             panel_type SINGLE_CRYSTAL_SILICON;
             efficiency 0.2;
             area 450;

                        object recorder {

		      	     	           file PV_out.csv;
		      	     	           interval 60;
					   limit 10000;
		      	     	           property VA_Out;
		      	     	     	 };


      }
//pv on the train
 object solar {
             name sol2;
             generator_mode SUPPLY_DRIVEN;
             generator_status ONLINE;
             panel_type SINGLE_CRYSTAL_SILICON;
             efficiency 0.2;
             area 46;


      }


 object player {
          name player;
          parent batt;
	  property  elevation;
	  file elevation2.player;

          loop 10000;


         };
object windturb_dg {
	name wdg;
	phases "ABCN";
	Gen_status ONLINE;
	Gen_type SYNCHRONOUS;
	Gen_mode CONSTANTP;
	Turbine_Model VESTAS_V82;

	 object recorder {
			    file WT_out.csv;
			    interval 60;
			//  limit 20000;
			    property Pconv, TotalRealPow;
		      	  };

		   }


object recorder {
	name battery_recorder;
	parent batt;
	property Energy1;
	file  battery_tests_dist.csv;
	interval 60;
	limit 10000;
}
